Vm_adc := 3.3
Vcc := 15
Vth := 3.5
# Analisis de la corriente y tension maxima por Rshunt
PRshunt := 5
Rs := 0.1
PR == V^2/R
Im := sqrt(PRshunt/Rs) = 7.07107
ImaxRs := 1
VmaxRs := Rs*ImaxRs = 0.1
Gain_Rs := Vm_adc/VmaxRs = 33
# Para un op amp en modo diferencial
Vo == Vd*(R2/R1)
R2 := 100*10^3
Gain_Rs == R2/R1 solve, R1 → 3030.3030303
R1 := 3300
Vm_adc_Rs := VmaxRs*R2/R1 = 3.0303
# Para probar con resistencias de 1/4 W
V_.25w := 5
Rmax := V_.25w^2/0.25 = 100
# Para fuente espejo mejorada
Vcc := 16
Ic := 20*10^-3
Re := 470
Radj := (Vcc - 0.7)/Ic - Re = 295
# Utilizar 1N4148 para sensor de temperatura
